w := 2*3.141529*4000 = 25132.2
Zx1 := 10^5/166 + 1j*2.513*10^4*0.321*10^-6*10^5 = 602.41 + 806.673i
|Zx1| = 1006.79
φx1 := (arg(Zx1)/deg) = 53.2483
Zk1 := 400 + 1/(1j*2.513*10^4*0.2*10^-6) = 400 - 198.965i
|Zk1| = 446.752
φk1 := (arg(Zk1)/deg) = -26.4464
Zx2 := 10^5/500 + 1j*2.513*10^4*0.4*10^-6*10^5 = 200 + 1005.2i
|Zx2| = 1024.9
φx1 := (arg(Zx2)/deg) = 78.7471
Zk2 := 456 + 1/(1j*2.513*10^4*4.8*10^-6) = 456 - 8.29022i
|Zk2| = 456.075
φk1 := (arg(Zk1)/deg) = -26.4464
Zвх1 := Zk1/Zx1 = 0.0793828 - 0.436582i
Zвх2 := Zk2/Zx2 = 0.0788886 - 0.437945i
|Zвх1| = 0.44374
φ1 := (arg(Zвх1)/deg) = -79.6946
|Zвх2| = 0.444993
φ2 := (arg(Zвх2)/deg) = -79.7886
Zk1 = 400 - 198.965i
Zx1 = 602.41 + 806.673i
tan(g_c) := sqrt(Zk1/Zx1) = 0.511431 - 0.426824i
t := 1/(sqrt(1 + 0.511 - 1j*0.427)*sqrt(1 - 0.511 + 1j*0.427)) = 0.966333 - 0.21731i
Zx1 = 602.41 + 806.673i
Zx2 = 200 + 1005.2i
.
t = 0.966333 - 0.21731i
A11 := t*sqrt(Zx1/Zx2) = 0.886608 - 0.421435i
A12 := t*sqrt(Zk1*Zx2) = 651.761 + 156.191i
A21 := t/sqrt(Zx1*Zx2) = 0.000191533 - 0.000956059i
A22 := t*sqrt(Zx2/Zx1) = 0.999337 + 0.00131693i
A11*A22 - A12*A21 = 0.612414 + 0.173219i
Z1 := A12 = 651.761 + 156.191i
Z2 := 1/A21 = 201.458 + 1005.6i
R1 := |Z1| = 670.215
R2 := |Z2| = 1025.58
Zc1 := sqrt(A11*A12/(A21*A22)) = 686.599 + 451.433i
Zc2 := sqrt(A22*A12/(A21*A11)) = 433.036 + 715.688i
Zг := 600
Zн := Zг
|Zн/Zc2| = 0.717276
0.4 ≤ 0.717 ≤ 2.5
